# Численно решим дифференциальное уравнение 1-го порядка:
a1 := [1, 1, 1, 1, 1]
matrixA1 := [0, 1; 1, 2]
matrix
a2 := [2, 0.2, 0, -0.2, -2.2]  # Переделывает в дискретное в вектор-матричном виде!!
matrixA2 := [0, 1; 1, 0.2]
matrixA3 := [0, 1; 1, 0]
matrixA5 := [0, 1; 1, -2.2]
matrixA4 := [0, 1; 1, -0.2]
fillingMatrixA :=
    □  # error: Пустой местозаполнитель.
